// COMSOL Multiphysics 5.6.0.280 model "1_1Purely_mechanical_PMMA_specimen.mph"
// Outline of the model tree

Parameters
  E0 = 2980[MPa]  // material
  E_bar = E0*(1-v0)/(1-2*v0)/(1+v0)
  v0 = 0.35  // material
  ft = 50[MPa]  // material
  Gf = 0.285[N/mm]  // material
  lch_bar = E_bar*Gf/ft^2  // characteristic length
  b0 = 4*hsize  // phase-field length
  xi = 2
  c0 = pi
  p = 2  // only suitable for linear and concrete softening
  a1 = 2*xi*lch_bar/c0/b0
  thk = 1[mm]  // geometry
  hsize = 22.5[um]  // size of the element
  block = 0.1[mm]
  a2 = -0.5  // linear softening, 1.3868 for concrete
  a3 = 0  // linear softening, 0.6567 for concrete
  tan_theta = 0.35/13.47
  notch = 0.4[mm]
  len = sqrt(0.35*0.35+13.47*13.47)[mm]
  ck = 2*b0*Gf/c0

Variables
  var1 "Phase-field"
    fai = (1-d)^p
    gai = a1*d*(1+a2*d+a3*d*d)
    dfai = -p*(1-d)^(p-1)
    dgai = a1+2*a1*a2*d+3*a1*a3*d*d
    omega = fai/(fai+gai)
    domega = (dfai*(fai+gai)-fai*(dfai+dgai))/(fai+gai)^2
    dalpha = xi+2*(1-xi)*d
    sigma1_bar = max(solid.sp1/omega,0)
    Y_bar = 0.5*sigma1_bar*sigma1_bar/E_bar
    Y0 = 0.5*ft*ft/E_bar
    H = max(Y0,max(Ymax,Y_bar))
    ph = -domega*H-Gf*dalpha/c0/b0

Common definitions
  state1: StateVariables "History" on domains 1-3
    state = Ymax
    initialValue = 0
    updateExpression = max(Ymax,Y_bar)
    update = afterStep

Geometry
  geom1 "Geometry 1" (2D, length unit m)
    r1: Rectangle | size = {63.5[mm], 60.96[mm]}
    c1: Circle | pos = {12.7[mm], 16.51[mm]}; r = 12.7[mm]/2
    c2: Circle | pos = {12.7[mm], 60.96[mm]-16.51[mm]}; r = 12.7[mm]/2
    c3: Circle | pos = {63.5[mm]-15.8[mm], 60.96[mm]-21.48[mm]}; r = 5[mm]
    r2: Rectangle | pos = {0, 60.96[mm]/2-2[mm]}; size = {20.86[mm], 4[mm]}
    c4: Circle | pos = {20.86[mm], 60.96[mm]/2}; rot = -90; r = 2[mm]; angle = 180
    pol1: Polygon
      source = table
      table = 
        {20.86[mm]+cos(1.5/180*pi)*2[mm], 60.96[mm]/2+sin(1.5/180*pi)*2[mm]}
        {20.86[mm]+cos(1.5/180*pi)*2[mm]+(len-notch)*cos(1.5/180*pi), 60.96[mm]/2+sin(1.5/180*pi)*2[mm]+(len-notch)*sin(1.5/180*pi)}
        {22.86[mm]+13.47[mm], 60.96[mm]/2+0.35[mm]}
        {20.86[mm]+cos(1.5/180*pi)*2[mm]+(len-notch)*cos(1.5/180*pi), 60.96[mm]/2-sin(1.5/180*pi)*2[mm]+(len-notch)*sin(1.5/180*pi)}
        {20.86[mm]+cos(1.5/180*pi)*2[mm], 60.96[mm]/2-sin(1.5/180*pi)*2[mm]}
    uni1: Union | input = c4, pol1, r2; intbnd = off; edge = all
    dif1: Difference | input = r1; input2 = c1, c2, c3, uni1
    pol2: Polygon
      type = open
      source = table
      table = 
        {20.86[mm]+cos(1.5/180*pi)*2[mm]+(len-notch)*cos(1.5/180*pi), 60.96[mm]/2+sin(1.5/180*pi)*2[mm]+(len-notch)*sin(1.5/180*pi)}
        {20.86[mm]+cos(1.5/180*pi)*2[mm]+(len-notch)*cos(1.5/180*pi), 60.96[mm]/2+0.75[mm]}
        {44[mm], 33[mm]}
        {63.5[mm]-15.8[mm]-5[mm]*sin(15/180*pi), 60.96[mm]-21.48[mm]-5[mm]*cos(15/180*pi)}
    pol3: Polygon
      type = open
      source = table
      table = 
        {20.86[mm]+cos(1.5/180*pi)*2[mm]+(len-notch)*cos(1.5/180*pi), 60.96[mm]/2-sin(1.5/180*pi)*2[mm]+(len-notch)*sin(1.5/180*pi)}
        {20.86[mm]+cos(1.5/180*pi)*2[mm]+(len-notch)*cos(1.5/180*pi), 30[mm]}
        {44.9[mm], 31.8[mm]}
        {63.5[mm]-15.8[mm]+5[mm]*sin(0/180*pi), 60.96[mm]-21.48[mm]-5[mm]*cos(0/180*pi)}
    pol4: Polygon
      type = open
      source = table
      table = 
        {22.86[mm]+13.47[mm], 60.96[mm]/2+0.35[mm]}
        {44.3[mm], 32.5[mm]}
        {63.5[mm]-15.8[mm]-5[mm]*sin(8/180*pi), 60.96[mm]-21.48[mm]-5[mm]*cos(8/180*pi)}
    fin: Finalize

Physics
  solid: SolidMechanics on domains 1-3
    dependent variable u = {u, v, w}
    ShapeProperty.order_displacement = 1
    EquationForm.form = Automatic
    Type2D.Type2D = PlaneStress
    d.d = thk
    StructuralTransientBehavior.StructuralTransientBehavior = Quasistatic
    lemm1: LinearElasticModel "Linear Elastic Material 1" (default)
      E_mat = userdef
      E = omega*E0
      nu_mat = userdef
      nu = v0
      rho_mat = userdef
      rho = 0
    free1: Free (default)
    init1: init "Initial Values 1" (default)
    disp1: Displacement0 "Prescribed Displacement 1" on points 7 | Direction = {1, 1, 0}
    disp2: Displacement0 "Prescribed Displacement 2" on points 10 | Direction = {1, 1, 0}; U0 = {0, 1[mm/s]*t, 0}
  poeq: PoissonEquation "Poisson's Equation 1" on domains 1-3
    dependent variable d
    ShapeProperty.order = 1
    Units.CustomSourceTermUnit = Pa
    peq1: PoissonEquation "Poisson's Equation 1" (default) | f = ph; c = {ck, 0, 0, ck}
    zflx1: ZeroFluxBoundary "Zero Flux 1" (default)
    init1: init "Initial Values 1" (default)

Mesh
  mesh1 "Mesh 1"
    size: MeshSizeDefault | hmax = 1.5[mm]; hmin = hsize; hgrad = 1.3; custom = on
    fq2: FreeQuad on domains 3
      size1: Size on domains 3 | hmax = hsize; custom = on
    fq1: FreeQuad on domains 2
      size1: Size on domains 2 | hmax = hsize; custom = on
    ftri1: FreeTri "Free Triangular 1" on remaining entities

Studies
  std1 "Study 1"
    time: Transient "Time Dependent 1" | tlist = range(0,0.001,0.45); usertol = on; rtol = 0.0001; notstudy = zero

Solver configurations
  sol1 "Solution 1" (study std1)
    v1: Variables "Dependent Variables 1"
      comp1_u: Field "Displacement field (comp1.u)" | scaleval = 1e-2*0.156524758425
    t1: Time "Time-Dependent Solver 1"
      tlist = range(0,0.001,0.45)
      tout = tsteps
      tstepsstore = 10
      initialstepbdf = 0.0001
      maxstepconstraintbdf = const
      maxstepbdf = 0.001
      maxstepexpressionbdf = 0.001
      estrat = exclude
      dDef: Direct
      se1: Segregated | segterm = itertol; segiter = 5000; maxsegiter = 2000; segtermonres = auto
        ssDef: SegregatedStep "disp" | segvar = {comp1_u, comp1_solid_wZ}; subdtech = auto; maxsubiter = 200
        ss1: SegregatedStep "damage" | segvar = {comp1_d}; subdtech = auto; subminstep = 1.0E-8; maxsubiter = 200
        ss2: SegregatedStep "history" | segvar = {comp1_state1}

Datasets
  dset1: Solution | solution = sol1

Plots
  pg5: PlotGroup2D "d" | data = dset1
    surf1: Surface "d" | expr = d; descr = 因变量 d