// COMSOL Multiphysics 5.6.0.280 model "Purely_mechanical_concrete_beam.mph"
// Outline of the model tree

Parameters
  E0 = 28800[MPa]  // material
  E_bar = E0*(1-v0)/(1-2*v0)/(1+v0)
  v0 = 0.18  // material
  ft = 2.8[MPa]  // material
  Gf = 0.1[N/mm]  // material
  b0 = 5*hsize  // phase-field-length
  xi = 2
  c0 = pi
  p = 2
  lch_bar = E_bar*Gf/ft/ft
  a1 = 2*xi*lch_bar/c0/b0
  hsize = 0.6[mm]
  thk = 156[mm]  // geometry
  notch = 5[mm]
  block = 10[mm]
  a2 = 1.3868  // softening
  a3 = 0.9106  // softening
  ck = 2*b0*Gf/c0

Variables
  var1 "Phase_field"
    fai = (1-d)^p
    gai = a1*d*(1+a2*d+a3*d*d)
    dfai = -p*(1-d)^(p-1)
    dgai = a1+2*a1*a2*d+3*a1*a3*d*d
    omega = fai/(fai+gai)
    domega = (dfai*(fai+gai)-fai*(dfai+dgai))/(fai+gai)^2
    dalpha = xi+2*(1-xi)*d
    sigma1_bar = max(solid.sp1/omega,0)
    Y_bar = 0.5*sigma1_bar*sigma1_bar/E_bar
    Y0 = ft*ft/2/E_bar
    H = max(Y0,max(Ymax,Y_bar))
    ph = -domega*H-Gf*dalpha/c0/b0
  var2 "Arc_length"
    CMSD = CMSDleft(v)-CMSDright(v)

Couplings
  aveop1: Average "CMSDleft" on points 11 | opname = CMSDleft
  aveop2: Average "CMSDright" on points 14 | opname = CMSDright

Probes
  var1: GlobalVariable | expr = -load; unit = kN; descr = Reaction force; table = tbl2

Common definitions
  state1: StateVariables "History" on domains 1, 3, 4
    name = History
    state = Ymax
    initialValue = 0
    updateExpression = max(Y_bar,Ymax)
    update = afterStep

Geometry
  geom1 "Geometry 1" (2D, length unit m)
    r1: Rectangle | size = {1322[mm], 306[mm]}
    r2: Rectangle | pos = {661[mm]-notch/2, 0}; size = {notch, 82[mm]}
    r3: Rectangle | pos = {600[mm], -block/2}; base = center; size = {block, block}
    r4: Rectangle | pos = {722[mm], 306[mm]+block/2}; base = center; size = {block, block}
    uni1: Union | input = r1, r3, r4
    dif1: Difference | input = uni1; input2 = r2
    pt1: Point | p = {203[mm], 306[mm]}
    pt2: Point | p = {1119[mm], 0}
    pt3: Point | p = {600[mm], -block}
    pt4: Point | p = {722[mm], 306[mm]+block}
    pol1: Polygon
      type = open
      source = table
      table = {{750[mm], 306[mm]}, {750[mm], 70[mm]}, {661[mm]+notch/2, 70[mm]}}
    pol2: Polygon
      type = open
      source = table
      table = {{661[mm]-notch/2-5[mm], 306[mm]}, {661[mm]-notch/2-5[mm], 70[mm]}, {661[mm]-notch/2, 70[mm]}}
    fin: Finalize

Physics
  solid: SolidMechanics on domains 1-5
    dependent variable u = {u, v, w}
    ShapeProperty.order_displacement = 1
    EquationForm.form = Automatic
    Type2D.Type2D = PlaneStress
    d.d = thk
    StructuralTransientBehavior.StructuralTransientBehavior = Quasistatic
    lemm1: LinearElasticModel "Linear Elastic Material 1" (default)
      E_mat = userdef
      E = omega*E0
      nu_mat = userdef
      nu = v0
      rho_mat = userdef
      rho = 0
    free1: Free (default)
    init1: init "Initial Values 1" (default)
    lemm2: LinearElasticModel "Linear Elastic Material 2" on domains 2, 5
      E_mat = userdef
      E = E0
      nu_mat = userdef
      nu = v0
      rho_mat = userdef
      rho = 0
    fix1: Fixed "Prescribed Displacement 1" on points 6
    disp1: Displacement0 "Prescribed Displacement 2" on points 24 | Direction = {0, 1, 0}; U0 = {0, 0[mm], 0}
    pl1: PointLoad on points 19 | Fp = {0, load, 0}
    pl2: PointLoad on points 3 | Fp = {0, 0.13*load, 0}
    ge1: GlobalEquations
      name = load
      equation = CMSD-1[mm/s]*t
      valueType = complex
      DependentVariableQuantity = force
      CustomDependentVariableUnit = m
      SourceTermQuantity = displacement
      CustomSourceTermUnit = m
  poeq: PoissonEquation "Poisson's Equation 1" on domains 1, 3, 4
    dependent variable d
    ShapeProperty.order = 1
    Units.CustomSourceTermUnit = Pa
    peq1: PoissonEquation "Poisson's Equation 1" (default) | f = ph; c = {ck, 0, 0, ck}
    zflx1: ZeroFluxBoundary "Zero Flux 1" (default)
    init1: init "Initial Values 1" (default)

Mesh
  mesh1 "Mesh 1"
    size: MeshSizeDefault | hmax = 10[mm]; hmin = hsize; hgrad = 1.2; custom = on; hnarrow = 1
    fq1: FreeQuad on domains 2, 3, 5
      size1: Size on domains 2, 3, 5 | hmax = hsize; hmin = hsize; hnarrow = 10; custom = on
    fq2: FreeQuad on remaining entities

Studies
  std1 "Study 1"
    time: Transient "Time Dependent 1" | tlist = range(0,0.0003,0.15); usertol = on; rtol = 0.001; notstudy = zero

Solver configurations
  sol1 "Solution 1" (study std1)
    v1: Variables "Dependent Variables 1"
      comp1_solid_wZ: Field "Out-of-plane displacement derivative (comp1.solid.wZ)" | scaleval = 1e-2
      comp1_u: Field "Displacement field (comp1.u)" | scaleval = 1e-2*0.156524758425
    t1: Time "Time-Dependent Solver 1"
      tlist = range(0,0.0003,0.15)
      tout = tsteps
      tstepsstore = 2
      initialstepbdf = 0.0001
      maxstepconstraintbdf = const
      maxstepbdf = 0.0003
      estrat = exclude
      dDef: Direct
      se1: Segregated | segterm = itertol; segiter = 1000; maxsegiter = 1000; segtermonres = auto
        ssDef: SegregatedStep "disp" | segvar = {comp1_solid_wZ, comp1_u, comp1_ODE1}; subdtech = auto; maxsubiter = 200
        ss1: SegregatedStep "damage" | segvar = {comp1_d}; subdtech = auto; maxsubiter = 200
        ss2: SegregatedStep "history" | segvar = {comp1_History}; subdtech = auto

Datasets
  dset1: Solution | solution = sol1
  dset2: Solution "varSoultion 2" | solution = sol1

Derived values
  gev1: EvalGlobal "var1" | data = dset2; table = tbl2; expr = -load

Tables
  tbl1: Table "探针表 1"
    Time (s) | Reaction force (kN)
    0 | 0
    0.0001 | 0.501246
    0.0002 | 1.00249
    0.0004 | 2.00499
    0.0007 | 3.50872
    0.001 | 5.01246
    0.0013 | 6.5162
    0.0016 | 8.01994
  tbl2: Table "Probe Table 2"
    Time (s) | Reaction force (kN)
    0 | 0
    0.0001 | 0.501246
    0.0002 | 1.00249
    0.0004 | 2.00499
    0.0007 | 3.50872
    0.001 | 5.01246
    0.0013 | 6.5162
    0.0016 | 8.01994
    0.0019 | 9.52368
    0.0022 | 11.0234
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
Plots
  pg5: PlotGroup2D "damage" | data = dset1
    surf1: Surface "damage" | expr = d; descr = 因变量 d
  pg6: PlotGroup1D "Probe Plot Group 6"
    tblp1: Table "Probe Table Graph 1" | table = tbl2; xaxisdata = auto; plotcolumns = 2