// COMSOL Multiphysics 5.6.0.280 model "Thermo_mechanical_ceramics.mph"
// Outline of the model tree

Parameters
  E0 = 370000[MPa]  // material
  E_bar = E0*(1-v0)/(1-2*v0)/(1+v0)
  v0 = 0.3  // material
  ft = 180[MPa]  // material
  Gf = 0.04247[N/mm]  // material
  b0 = 3*hsize  // phase-field-length
  xi = 2
  c0 = pi
  p = 2
  lch_bar = E_bar*Gf/ft/ft
  a1 = 2*xi*lch_bar/c0/b0
  a2 = -0.5  // softening
  thk = 1[mm]  // geometry
  hsize = 0.05[mm]
  length = 50[mm]
  height = 10[mm]
  alpha = 7.5e-6[1/K]
  rho = 3980[kg/m^3]
  k = 31[W/m/K]
  c = 880[J/kg/K]
  T0 = 300[degC]
  TFinal = 20[degC]
  a3 = 0  // softening
  ck = 2*b0*Gf/c0

Variables
  var1 "Phase-field"
    fai = (1-d)^p
    gai = a1*d*(1+a2*d+a3*d*d)
    dfai = -p*(1-d)^(p-1)
    dgai = a1+2*a1*a2*d+3*a1*a3*d*d
    omega = fai/(fai+gai)
    domega = (dfai*(fai+gai)-fai*(dfai+dgai))/(fai+gai)^2
    dalpha = xi+2*(1-xi)*d
    sigma1_bar = max(solid.sp1/omega,0)
    Y_bar = 0.5*sigma1_bar*sigma1_bar/E_bar
    Y0 = ft*ft/2/E_bar
    H = max(Y0,max(Ymax,Y_bar))
    ph = -domega*H-Gf*dalpha/c0/b0

Common definitions
  state1: StateVariables "History" on domains 1
    name = History
    state = Ymax
    initialValue = 0
    updateExpression = {max(Y_bar,Ymax), }
    update = afterStep

Geometry
  geom1 "Geometry 1" (2D, length unit m)
    r1: Rectangle | size = {length/2, height/2}
    fin: Finalize

Physics
  solid: SolidMechanics on all domains
    dependent variable u = {u, v, w}
    ShapeProperty.order_displacement = 1
    EquationForm.form = Automatic
    Type2D.Type2D = PlaneStress
    d.d = thk
    StructuralTransientBehavior.StructuralTransientBehavior = Quasistatic
    lemm1: LinearElasticModel "Linear Elastic Material 1" (default)
      E_mat = userdef
      E = omega*E0
      nu_mat = userdef
      nu = v0
      rho_mat = userdef
      rho = 0
      te1: ThermalExpansion on all domains
        alpha_mat = userdef
        alpha = alpha
        minput_strainreferencetemperature = T0
        minput_temperature = T
    free1: Free (default)
    init1: init "Initial Values 1" (default)
    disp1: Displacement1 "Prescribed Displacement 1" on boundaries 2 | Direction = {0, 1, 0}
    disp2: Displacement1 "Prescribed Displacement 2" on boundaries 4 | Direction = {1, 0, 0}
  poeq: PoissonEquation "Poisson's Equation 1" on all domains
    dependent variable d
    ShapeProperty.order = 1
    Units.CustomSourceTermUnit = Pa
    peq1: PoissonEquation "Poisson's Equation 1" (default) | f = ph; c = {ck, 0, 0, ck}
    zflx1: ZeroFluxBoundary "Zero Flux 1" (default)
    init1: init "Initial Values 1" (default)
  ht: HeatTransfer "Heat Transfer in Solids 1" on all domains
    dependent variable T
    ShapeProperty.order_temperature = 1
    PhysicalModelProperty.hasDG = 0
    PhysicalModelProperty.dz = thk
    solid1: SolidHeatTransferModel "Solid 1" (default)
      k_mat = userdef
      k = k
      rho_mat = userdef
      rho = rho
      Cp_mat = userdef
      Cp = c
    init1: init "Initial Values 1" (default) | Tinit = T0
    ins1: ThermalInsulation (default)
    temp1: TemperatureBoundary "Temperature 1" on boundaries 1, 3 | T0 = TFinal

Mesh
  mesh1 "Mesh 1"
    size: MeshSizeDefault | hmax = hsize; hmin = hsize; hgrad = 1.05; custom = on
    map1: Map "Mapped 1" on remaining entities

Studies
  std1 "Study 1"
    time: Transient "Time Dependent 1" | tlist = range(0,0.0001,0.1); usertol = on; rtol = 0.001; notstudy = zero

Solver configurations
  sol1 "Solution 1" (study std1)
    v1: Variables "Dependent Variables 1"
      comp1_solid_wZ: Field "Out-of-plane displacement derivative (comp1.solid.wZ)" | scaleval = 1e-2
      comp1_u: Field "Displacement field (comp1.u)" | scaleval = 1e-2*0.156524758425
    t1: Time "Time-Dependent Solver 1"
      tlist = range(0,0.0001,0.1)
      tout = tsteps
      initialstepbdf = 0.00001
      maxstepconstraintbdf = const
      maxstepbdf = 0.0001
      estrat = exclude
      dDef: Direct
      se1: Segregated | segterm = itertol; segiter = 1000; maxsegiter = 1000; segtermonres = auto
        ht1: SegregatedStep "T" | subdtech = auto; maxsubiter = 200
        ssDef: SegregatedStep "disp" | segvar = {comp1_solid_wZ, comp1_u}; subdtech = auto; maxsubiter = 200
        ss1: SegregatedStep "damage" | segvar = {comp1_d}; subdtech = auto; maxsubiter = 200
        ss2: SegregatedStep "H" | segvar = {comp1_History}; subdtech = auto
        ll1: LowerLimit "d_min 1" | lowerlimit = comp1.d 0

Datasets
  dset1: Solution | solution = sol1
  mir1: Mirror2D | data = dset1; genpoints = {{0, 0}, {25[mm], 0}}
  mir2: Mirror2D | data = mir1; genpoints = {{25[mm], 0}, {25[mm], 1}}

Plots
  pg8: PlotGroup2D "temperature" | data = dset1
    surf1: Surface "temperature" | expr = T; unit = degC
  pg5: PlotGroup2D "damage" | data = mir2
    surf1: Surface "damage" | expr = d; descr = 因变量 d