// COMSOL Multiphysics 5.6.0.280 model "3Electro_magneto_mechanical_superconductor.mph"
// Outline of the model tree

Parameters
  E0 = 100000[MPa]  // material
  E_bar = E0*(1-v0)/(1-2*v0)/(1+v0)
  v0 = 0.33  // material
  ft = 50[MPa]  // material
  Gf = 0.02[N/mm]  // material
  b0 = 4*hsize  // phase-field-length
  xi = 2
  c0 = pi
  p = 2
  lch_bar = E_bar*Gf/ft^2
  a1 = 2*xi*lch_bar/c0/b0
  a2 = -0.5  // softening
  mu0 = mu0_const
  E00 = 1e-6[V/m]
  Jc0 = 4.6e8[A/m^2]
  Tc = 92[K]
  T0 = 40[K]
  sT = (1-(T0/Tc)^2)^1.5
  B0 = 1.3[T]
  r = 10[mm]
  a3 = 0  // softening
  hsize = 0.02[mm]
  thk = 1[mm]  // geometry
  rho_normal = 3.5e-6[V/A*m]
  ck = 2*b0*Gf/c0

Functions
  pw1: Piecewise "Bext" | funcname = Bext; arg = t; smooth = contd1; smoothzone = 0.05; pieces = {0, 10[ms], 10[T/ms]*t}; argunit = s; fununit = T

Variables
  var1 "Phase-field"
    fai = (1-d)^p
    gai = a1*d*(1+a2*d+a3*d*d)
    dfai = -p*(1-d)^(p-1)
    dgai = a1+2*a1*a2*d+3*a1*a3*d*d
    omega = fai/(fai+gai)
    domega = (dfai*(fai+gai)-fai*(dfai+dgai))/(fai+gai)^2
    dalpha = xi+2*(1-xi)*d
    sigma1_bar = max(solid.sp1/omega,0)
    Y_bar = 0.5*sigma1_bar*sigma1_bar/E_bar
    Y0 = ft*ft/2/E_bar
    H = max(Y0,max(Y_bar,Ymax))
    ph = -domega*H-Gf*dalpha/c0/b0
  var2 "Magnetic"
    sB = B0/(B0+abs(mu0*Hz+Bext(t)))  // follows the applied magnetic field
    Jc = omega*sT*sB*Jc0
    rho_PL = E00/Jc*(mfh.normJ/Jc)^1

Common definitions
  state1: StateVariables "History" on domains 1-4
    name = History
    state = Ymax
    initialValue = 0
    updateExpression = {max(Y_bar,Ymax), }
    update = afterStep

Geometry
  geom1 "Geometry 1" (2D, length unit m)
    c1: Circle | r = r; angle = 90
    sq1: Square | base = center; size = r
    dif2: Difference | input = c1; input2 = sq1
    pol1: Polygon | type = open; source = table; table = {{5[mm], 4.5[mm]}, {r*cos(42.5/180*pi), r*sin(42.5/180*pi)}}
    mir1: Mirror | input = pol1; keep = on; axis = {-1, 1}
    pol2: Polygon | type = open; source = table; table = {{5[mm], 5[mm]}, {r*cos(45/180*pi), r*sin(45/180*pi)}}
    fin: Finalize

Physics
  solid: SolidMechanics on all domains
    dependent variable u = {u, v, w}
    ShapeProperty.order_displacement = 1
    EquationForm.form = Automatic
    Type2D.Type2D = PlaneStrain
    d.d = thk
    StructuralTransientBehavior.StructuralTransientBehavior = Quasistatic
    lemm1: LinearElasticModel "Linear Elastic Material 1" (default)
      E_mat = userdef
      E = E0*omega
      nu_mat = userdef
      nu = v0
      rho_mat = userdef
      rho = 0
    free1: Free (default)
    init1: init "Initial Values 1" (default)
    bl1: BodyLoad "Body Force 1" on domains 1-4
      LoadType = ForceVolume
      FperVol_src = userdef
      FperVol = {mfh.FLtzix, mfh.FLtziy, 0}
    disp1: Displacement1 "Prescribed Displacement 1" on boundaries 1, 5, 7 | Direction = {1, 0, 0}
    disp2: Displacement1 "Prescribed Displacement 2" on boundaries 2, 3, 6 | Direction = {0, 1, 0}
  mfh: MagneticFieldFormulation on all domains
    dependent variable H = {Hx, Hy, Hz}
    ShapeProperty.order_magneticfield = 1
    components.components = inplane
    fl1: FaradaysLaw (default)
      ConstitutiveRelationBH = Magnetization
      M = {0, 0, Bext(t)/mu0}
      mur_mat = userdef
      mur = 1
      ConstitutiveRelationJcE = ElectricalResistivity
      sigma_mat = userdef
      sigma = 0
      rho_mat = userdef
      rho = rho_PL
      normE_mat = userdef
      normE = E00
      epsilonr_mat = userdef
      epsilonr = 1
      materialType = nonSolid
    mi1: MagneticInsulation (default)
    init1: init "Initial Values 1" (default) | H = {0, 0, Bext(0)/mu0}
    pmc1: PerfectMagneticConductor on boundaries 1-3, 5-7, 10-13
  poeq: PoissonEquation "Poisson's Equation 1" on all domains
    dependent variable d
    ShapeProperty.order = 1
    Units.CustomSourceTermUnit = Pa
    peq1: PoissonEquation "Poisson's Equation 1" (default) | f = ph; c = {ck, 0, 0, ck}
    zflx1: ZeroFluxBoundary "Zero Flux 1" (default)
    init1: init "Initial Values 1" (default)

Mesh
  mesh1 "Mesh 1"
    size: MeshSizeDefault | hmax = 0.2[mm]; hmin = hsize; hgrad = 1.3; custom = on
    fq1: FreeQuad on domains 2
      size1: Size on domains 2 | hmax = hsize; custom = on
    fq2: FreeQuad on domains 4
      size1: Size on domains 4 | hmax = hsize; custom = on
    fq3: FreeQuad on remaining entities

Studies
  std1 "Study 1"
    time: Transient "Time Dependent 1" | tlist = range(0,1e-2[ms],2[ms]); usertol = on; rtol = 0.001; notstudy = zero

Solver configurations
  sol1 "Solution 1" (study std1)
    v1: Variables "Dependent Variables 1"
    t1: Time "Time-Dependent Solver 1"
      tlist = range(0,1e-2[ms],2[ms])
      tout = tsteps
      initialstepbdf = 1e-3[ms]
      maxstepconstraintbdf = const
      maxstepbdf = 1e-2[ms]
      estrat = exclude
      dDef: Direct
      se1: Segregated | segiter = 1000; maxsegiter = 1000; segtermonres = auto
        ss3: SegregatedStep "magnetic" | segvar = {comp1_H}; subdtech = auto; maxsubiter = 200
        ssDef: SegregatedStep "disp" | segvar = {comp1_u}; subdtech = auto; maxsubiter = 200
        poeq1: SegregatedStep "damage" | subdtech = auto; maxsubiter = 200
        ss2: SegregatedStep "H" | segvar = {comp1_History}; subdtech = auto
        ll1: LowerLimit "d_min 1" | lowerlimit = comp1.d 0

Datasets
  dset1: Solution | solution = sol1

Plots
  pg5: PlotGroup2D "damage" | data = dset1
    surf1: Surface "damage 1" | expr = d; descr = 因变量 d