// COMSOL Multiphysics 5.6.0.280 model "Chemo_mechanical_hydrogen.mph"
// Outline of the model tree

Parameters
  E0 = 210000[MPa]  // material
  E_bar = E0*(1-v0)/(1-2*v0)/(1+v0)
  v0 = 0.3  // material
  ft = 7400[MPa]  // material
  Gf = 64[N/mm]  // material
  b0 = 5*hsize  // phase-field-length
  lch_bar = E_bar*Gf/ft/ft
  xi = 2
  D = 3.8e-11[m^2/s]
  T = 300[K]
  Gibbs = 30000[J/mol]
  R = 8.314[J/(mol*K)]
  VH = 2000[mm^3/mol]
  cc0 = D*VH/R/T  // invloved in flux J
  A = exp(-Gibbs/R/T)  // involved in theta(C)
  chi = 0.94
  C_ini = 2.30849  // wt.ppm, mol/m3 can be another option
  hsize = 0.018[mm]
  thk = 1[mm]  // geometry
  c0 = pi
  p = 2
  a2 = -0.5  // softening
  a3 = 0  // softening

Functions
  an1: Analytic "degradation" | funcname = degradation; expr = sqrt(1-0.94*(5.5e-5*C/(5.5e-5*C+A)))*3300; args = C; argunit = 1; fununit = 1

Variables
  var3 "Diffusion"
    theta = 5.5e-5*C/(5.5e-5*C+A)  // only available when unit of C is wt. ppm.
    phi = 1-chi*theta
  var2 "Mechanical"
    sigmah = solid.I1s/3
    ft_C = ft*sqrt(phi)  // consider the degradation due to hydrogen
    Gf_C = Gf*phi  // consider the degradation due to hydrogen
  var1 "Phase-field"
    lch_C_bar = E_bar*Gf_C/ft_C/ft_C  // consider the degradation due to hydrogen
    a1_C = 2*xi*lch_C_bar/c0/b0  // consider the degradation due to hydrogen
    ck_C = 2*b0*Gf_C/c0  // consider the degradation due to hydrogen
    fai = (1-d)^p
    gai = a1_C*d*(1+a2*d+a3*d*d)
    dfai = -p*(1-d)^(p-1)
    dgai = a1_C+2*a1_C*a2*d+3*a1_C*a3*d*d
    omega = fai/(fai+gai)
    domega = (dfai*(fai+gai)-fai*(dfai+dgai))/(fai+gai)^2
    dalpha = xi+2*(1-xi)*d
    sigma1_bar = max(solid.sp1/omega,0)
    Y_bar = 0.5*sigma1_bar*sigma1_bar/E_bar
    Y0 = ft_C*ft_C/2/E_bar
    H = max(Y0,max(Ymax,Y_bar))
    ph = -domega*H-Gf_C*dalpha/c0/b0

Probes
  bnd1: Boundary on boundaries 6
    type = integral
    expr = solid.RFy/3
    unit = N
    method = summation
    frame = spatial
    table = tbl1

Common definitions
  state1: StateVariables "History" on all domains
    state = Ymax
    initialValue = 0
    updateExpression = {max(Ymax,Y_bar), }
    update = afterStep

Geometry
  geom1 "Geometry 1" (2D, length unit m)
    r1: Rectangle | pos = {2.5[mm], 20[mm]}; base = center; size = {5[mm], 10[mm]}
    ca1: CircularArc
      center = {2[mm]-0.8[mm], 20[mm]}
      r = 0.8[mm]
      point1 = {0.0016, 0.019307179677}
      point2 = {0.0016, 0.020692820323}
      angle1 = -60
      angle2 = 60
    pol1: Polygon "Ploygon 1"
      source = table
      table = 
        {(2[mm]-0.8[mm])+0.8[mm]*cos(60/180*pi), (20[mm])+0.8[mm]*sin(60/180*pi)}
        {0, (20[mm])+0.8[mm]*sin(60/180*pi)+1.6[mm]/sqrt(3)}
    pol6: Polygon
      source = table
      table = 
        {(2[mm]-0.8[mm])+0.8[mm]*cos(60/180*pi), 20[mm]-0.8[mm]*sin(60/180*pi)}
        {0, 20[mm]-0.8[mm]*sin(60/180*pi)-1.6[mm]/sqrt(3)}
    ls1: LineSegment | vertex1 = pol1(1) points 2; vertex2 = pol6(1) points 2
    csol1: ConvertToSolid | input = ca1, ls1, pol1, pol6
    dif1: Difference | input = r1; input2 = csol1
    pol2: Polygon
      type = open
      source = table
      table = 
        {(2[mm]-0.8[mm])+0.8[mm]*cos(30/180*pi), 20[mm]+0.8[mm]*sin(30/180*pi)}
        {5[mm], 20[mm]+0.8[mm]*sin(30/180*pi)}
    pol3: Polygon
      type = open
      source = table
      table = 
        {(2[mm]-0.8[mm])+0.8[mm]*cos(30/180*pi), 20[mm]-0.8[mm]*sin(30/180*pi)}
        {5[mm], 20[mm]-0.8[mm]*sin(30/180*pi)}
    pol4: Polygon
      type = open
      source = table
      table = {{2.2[mm], 20[mm]+0.8[mm]*sin(30/180*pi)}, {2.2[mm], 20[mm]-0.8[mm]*sin(30/180*pi)}}
    fin: Finalize

Physics
  solid: SolidMechanics on all domains
    dependent variable u = {u, v, w}
    ShapeProperty.order_displacement = 1
    EquationForm.form = Automatic
    Type2D.Type2D = PlaneStress
    d.d = thk
    StructuralTransientBehavior.StructuralTransientBehavior = Quasistatic
    lemm1: LinearElasticModel "Linear Elastic Material 1" (default)
      E_mat = userdef
      E = E0*omega
      nu_mat = userdef
      nu = v0
      rho_mat = userdef
      rho = 0
    free1: Free (default)
    init1: init "Initial Values 1" (default)
    disp1: Displacement1 "Prescribed Displacement 1" on boundaries 2 | Direction = {0, 1, 0}
    disp2: Displacement1 "Prescribed Displacement 2" on boundaries 12-14 | Direction = {1, 0, 0}
    disp3: Displacement1 "Prescribed Displacement 3" on boundaries 6 | Direction = {0, 1, 0}; U0 = {0, 1e-3[mm/s]*t, 0}
  poeq: PoissonEquation "Poisson's Equation 1" on all domains
    dependent variable d
    ShapeProperty.order = 1
    Units.CustomSourceTermUnit = Pa
    peq1: PoissonEquation "Poisson's Equation 1" (default) | f = ph; c = {ck_C, 0, 0, ck_C}
    zflx1: ZeroFluxBoundary "Zero Flux 1" (default)
    init1: init "Initial Values 1" (default)
  c: CoefficientFormPDE on all domains
    dependent variable C
    ShapeProperty.order = 1
    Units.SourceTermQuantity = specificdissipationrate
    cfeq1: CoefficientFormPDE (default) | c = {D, 0, 0, D}; f = 0; da = 1; al = {-cc0*HStaticx, -cc0*HStaticy}
    zflx1: ZeroFluxBoundary "Zero Flux 1" (default)
    init1: init "Initial Values 1" (default) | C = C_ini
    dir1: DirichletBoundary "Dirichlet Boundary Condition 1" on boundaries 1-6, 12-17 | r = C_ini
  dode: DomainODE "Domain ODEs and DAEs" on all domains
    dependent variable HStatic
    ShapeProperty.shapeFunctionType = shlag
    ShapeProperty.order = 1
    Units.DependentVariableQuantity = pressure
    Units.SourceTermQuantity = pressure
    dode1: DistributedODE (default) | f = HStatic-sigmah; da = 0
    init1: init "Initial Values 1" (default)

Mesh
  mesh1 "Mesh 1"
    size: MeshSizeDefault | hmax = 0.5[mm]; hmin = hsize; custom = on; hgrad = 1.1
    map1: Map "Mapped 1" on domains 4
      size1: Size on domains 3, 4 | hmax = hsize; hmin = hsize; custom = on
    fq1: FreeQuad on remaining entities
      size1: Size on domains 3 | hmax = hsize; hmin = hsize; custom = on

Studies
  std1 "Study 1"
    time: Transient "Time Dependent 1" | tlist = range(0,0.1,60); usertol = on; rtol = 0.001; notstudy = zero

Solver configurations
  sol1 "Solution 1" (study std1)
    v1: Variables "Dependent Variables 1"
      comp1_u: Field "Displacement field (comp1.u)" | scaleval = 1e-2*0.156524758425
    t1: Time "Time-Dependent Solver 1"
      tlist = range(0,0.1,60)
      tout = tsteps
      initialstepbdf = 0.1
      maxstepconstraintbdf = const
      maxstepexpressionbdf = 0.2*(t<400)+0.02*(t>=400)
      estrat = exclude
      dDef: Direct
      se1: Segregated | segterm = itertol; segiter = 1000; maxsegiter = 1000; segtermonres = auto
        ssDef: SegregatedStep "disp&C"
          segvar = {comp1_u, comp1_HStatic, comp1_C, comp1_solid_wZ}
          subdtech = auto
          subtermonres = auto
          maxsubiter = 10000
        poeq1: SegregatedStep "d" | subdtech = auto; subtermonres = auto; maxsubiter = 10000
        ss3: SegregatedStep "history" | segvar = {comp1_state1}; subdtech = auto

Datasets
  dset1: Solution | solution = sol1
  dset2: Solution "Probe Solution 2" | solution = sol1
  int1: Integral "bnd1" on boundaries 6 | data = dset2

Tables
  tbl1: Table "Probe Table 1"
    Time (s) | Dependent variable d (N), bnd1 {int1}
    0 | 0
    0.1 | 2.593
    0.2 | 5.186
    0.3 | 7.779
    0.4 | 10.372
    0.5 | 12.965
    0.6 | 15.558
    0.7 | 18.151
    0.8 | 20.744
    0.9 | 23.337
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
Plots
  pg7: PlotGroup2D "Concentration" | data = dset1
    surf1: Surface "Concentration" | expr = C
  pg8: PlotGroup2D "damage" | data = dset1
    surf1: Surface "damage" | expr = d
  pg9: PlotGroup1D "Probe Plot Group 9"
    tblp1: Table "Probe Table Graph 1" | table = tbl1