// COMSOL Multiphysics 5.6.0.280 model "new8.mph"
// Outline of the model tree

Parameters
  E_inf = 35000[MPa]  // final elastic modulus
  bar = (1-v_inf)/(1-2*v_inf)/(1+v_inf)
  v_inf = 0.18  // final poisson's ratio
  ft_inf = 5.29[MPa]  // final tensile strength
  Gf_inf = 0.1[N/mm]  // final fracture energy
  E_steel = 200[GPa]
  v_steel = 0.3
  theta_steel = 12e-6[K^-1]
  b0 = 5*hsize  // phase-field-length
  lch_inf = E_inf*Gf_inf/ft_inf/ft_inf
  beta0 = 0.05
  theta = 10e-6[K^-1]  // linear expansion
  kappa = 450e-6  // shrinkage coefficient
  xi = 2
  c0 = pi
  p = 2
  a2 = 1.3868  // softening
  WCratio = 0.3  // water/cement
  beta_inf = 1-exp(-3.3*WCratio)  // final hydration degree
  T_0 = 21[degC]
  hcov = 8[W/m^2/K]  // convection coefficient
  hcov_steel = 100[W/m^2/K]
  k0 = 2.8[W/m/K]  // thermal conductivity
  k_steel = 50[W/m/K]
  c_sh = 1000[J/kg/K]  // specific heat
  c_sh_steel = 460[J/kg/K]
  Q_inf = 117840000[J/m^3]  // total potential heat
  rho = 2400[kg/m^3]  // density
  rho_steel = 7800[kg/m^3]
  R = 8.314[J/K/mol]
  Ea = 45729.75[J/mol]  // activation energy
  B0 = 11.257
  B1 = 18589
  B2 = -167605
  B3 = 619454
  B4 = -1175010
  B5 = 1141310
  B6 = -452115
  hsize = 1[mm]
  thk = 1[mm]  // geometry
  a3 = 0.9106  // softening

Functions
  an2: Analytic "E_beta" | funcname = E_beta; expr = (beta<=beta0)*(E_inf/10)+(beta>beta0)*(E_inf/10+0.9*E_inf*(beta-beta0)/(beta_inf-beta0)); args = beta; argunit = 1; fununit = Pa
  an3: Analytic "Gf_beta" | funcname = Gf_beta; expr = (beta<=beta0)*(Gf_inf/10)+(beta>beta0)*(Gf_inf/10+0.9*Gf_inf*(beta-beta0)/(beta_inf-beta0)); args = beta; argunit = 1; fununit = N/m
  an4: Analytic "ft_beta" | funcname = ft_beta; expr = (beta<=beta0)*(ft_inf/10)+(beta>beta0)*(ft_inf/10+0.9*ft_inf*(beta-beta0)/(beta_inf-beta0)); args = beta; argunit = 1; fununit = Pa
  an6: Analytic "Psi_beta" | funcname = Psi_beta; expr = B0+B1*beta^1+B2*beta^2+B3*beta^3+B4*beta^4+B5*beta^5+B6*beta^6; args = beta; argunit = 1; fununit = 1/s

Variables
  var1 "Mechanical_Phase-field"
    lch_beta = bar*E_beta(beta)*Gf_beta(beta)/ft_beta(beta)/ft_beta(beta)
    a1 = 2*xi*lch_beta/c0/b0
    ck = 2*b0*Gf_beta(beta)/c0
    fai = (1-d)^p
    gai = a1*d*(1+a2*d+a3*d*d)
    dfai = -p*(1-d)^(p-1)
    dgai = a1+2*a1*a2*d+3*a1*a3*d*d
    omega = fai/(fai+gai)
    domega = (dfai*(fai+gai)-fai*(dfai+dgai))/(fai+gai)^2
    dalpha = xi+2*(1-xi)*d
    sigma1_bar = max(solid1.sp1/omega,0)
    Y_bar = 0.5*sigma1_bar*sigma1_bar/(E_beta(beta)*bar)
    Y0 = 0.5*ft_beta(beta)*ft_beta(beta)/(E_beta(beta)*bar)
    H = max(Y0,max(Y_bar,Ymax))
    ph = -domega*H-Gf_beta(beta)*dalpha/c0/b0
    shrinkage = -kappa*((0)*(beta<=beta0)+((beta-beta0)/(beta_inf-beta0))*(beta>beta0))

Common definitions
  state1: StateVariables "History" on domains 2
    state = Ymax
    initialValue = 0
    updateExpression = max(Ymax,Y_bar)
    update = afterStep

Geometry
  geom1 "Geometry 1" (2D, length unit m)
    c1: Circle | r = 225[mm]; angle = 90
    c3: Circle | r = 150[mm]-9.5[mm]; angle = 90
    dif1: Difference | input = c1; input2 = c3
    ca1: CircularArc | r = 150[mm]; point1 = {0.15, 0}; point2 = {9.18485099361e-18, 0.15}
    fin: Finalize

Physics
  ht: HeatTransfer "Heat Transfer in Solids" on domains 1, 2
    dependent variable T
    ShapeProperty.order_temperature = 1
    PhysicalModelProperty.IsothermalDomain = 0
    PhysicalModelProperty.dz = thk
    PhysicalModelProperty.Tref = T_0
    solid1: SolidHeatTransferModel "Solid 1" (default)
      k_mat = userdef
      k = k0*omega
      rho_mat = userdef
      rho = rho
      Cp_mat = userdef
      Cp = c_sh
    init1: init "Initial Values 1" (default) | Tinit = T_0
    ins1: ThermalInsulation (default)
    hs1: HeatSource on domains 2 | Q0 = Q_inf*betat
    hf1: HeatFluxBoundary "Heat Flux 1" on boundaries 6
      HeatFluxType = ConvectiveHeatFlux
      h = hcov
      Text = T_0
      materialType = solid
    solid2: SolidHeatTransferModel "Solid 2" on domains 1
      k_mat = userdef
      k = k_steel
      rho_mat = userdef
      rho = rho_steel
      Cp_mat = userdef
      Cp = c_sh_steel
    hf2: HeatFluxBoundary "Heat Flux 2" on boundaries 5
      HeatFluxType = ConvectiveHeatFlux
      h = hcov_steel
      Text = T_0
      materialType = solid
  dode3: DomainODE "Domain ODEs and DAEs" on domains 2
    dependent variable beta
    ShapeProperty.shapeFunctionType = shlag
    ShapeProperty.order = 1
    Units.CustomSourceTermUnit = 1/s
    dode1: DistributedODE (default) | f = omega*Psi_beta(beta)*exp(-Ea/R/T); da = 1
    init1: init "Initial Values 1" (default) | beta = 0
  solid1: SolidMechanics on domains 1, 2
    dependent variable u = {u, v, w}
    ShapeProperty.order_displacement = 1
    EquationForm.form = Automatic
    Type2D.Type2D = PlaneStrain
    d.d = thk
    StructuralTransientBehavior.StructuralTransientBehavior = Quasistatic
    cref.cref = solid1.cp
    lemm1: LinearElasticModel "Linear Elastic Material 1" (default)
      MixedFormulation = none
      E_mat = userdef
      E = omega*E_beta(beta)
      nu_mat = userdef
      nu = v_inf
      rho_mat = userdef
      rho = 0
      te1: ThermalExpansion on all domains
        alpha_mat = userdef
        alpha = theta
        minput_strainreferencetemperature = T_0
        minput_temperature = T
      eiel1: ExternalStrain on all domains
        InelasticResidualQuantity = Strain
        StrainInput = StrainTensor
        eext_src = userdef
        eext = diag{shrinkage, shrinkage, 0}
    free1: Free (default)
    init1: init "Initial Values 1" (default)
    lemm2: LinearElasticModel "Linear Elastic Material 2" on domains 1
      E_mat = userdef
      E = E_steel
      nu_mat = userdef
      nu = v_steel
      rho_mat = userdef
      rho = 0
      te1: ThermalExpansion on all domains
        alpha_mat = userdef
        alpha = theta_steel
        minput_strainreferencetemperature = T_0
        minput_temperature = T
    disp1: Displacement1 "Prescribed Displacement 1" on boundaries 3, 4 | Direction = {0, 1, 0}
    disp2: Displacement1 "Prescribed Displacement 2" on boundaries 1, 2 | Direction = {1, 0, 0}
  poeq: PoissonEquation "Poisson's Equation 1" on domains 2
    dependent variable d
    ShapeProperty.order = 1
    Units.CustomSourceTermUnit = Pa
    peq1: PoissonEquation "Poisson's Equation 1" (default) | f = ph; c = {ck, 0, 0, ck}
    zflx1: ZeroFluxBoundary "Zero Flux 1" (default)
    init1: init "Initial Values 1" (default)

Mesh
  mesh1 "Mesh 1"
    size: MeshSizeDefault | hmax = 1[mm]; hmin = 1[mm]; hgrad = 1.2; custom = on
    map1: Map "Mapped 1" on remaining entities

Studies
  std1 "Study 1"
    time: Transient "Time Dependent 1" | tlist = range(0,600,4*24*3600); usertol = on; rtol = 0.001; notstudy = zero

Solver configurations
  sol1 "Solution 1" (study std1)
    v1: Variables "Dependent Variables 1"
    t1: Time "Time-Dependent Solver 1"
      tlist = range(0,600,4*24*3600)
      tout = tsteps
      initialstepbdf = 100
      maxstepconstraintbdf = const
      maxstepbdf = 600
      maxstepexpressionbdf = 600
      estrat = exclude
      dDef: Direct
      se1: Segregated | segterm = itertol; segiter = 1000; maxsegiter = 10000; segtermonres = auto; segstabacc = segaacc
        solid11: SegregatedStep "T" | segvar = {comp1_T}; subdtech = auto; maxsubiter = 200
        ht1: SegregatedStep "beta" | segvar = {comp1_beta}; subdtech = auto; maxsubiter = 200
        ss1: SegregatedStep "u" | segvar = {comp1_u}; subdtech = auto; maxsubiter = 200
        ss2: SegregatedStep "damage" | segvar = {comp1_d}; subdtech = auto; subtermonres = auto; maxsubiter = 1000
        dode61: SegregatedStep "history" | segvar = {comp1_state1}

Datasets
  dset1: Solution | solution = sol1

Plots
  pg5: PlotGroup2D "d" | data = dset1
    surf1: Surface "d" | expr = d; descr = 因变量 d