// COMSOL Multiphysics 5.6.0.280 model "Electromechanical_piezoelectric.mph"
// Outline of the model tree

Parameters
  E0 = 83162.2[MPa]  // material
  E0_bar = E0*(1-v0)/(1+v0)/(1-2*v0)
  v0 = 0.35886  // material
  ft = 55[MPa]  // material
  Gf = 0.007[N/mm]  // material
  b0 = 5*hsize  // phase-field-length
  xi = 2
  c0 = pi
  p = 2
  lch = E0*Gf/ft^2
  lch_bar = E0_bar*Gf/ft^2
  a1 = 2*xi*lch_bar/c0/b0
  a2 = -0.5  // softening
  tiplength = 0.46[mm]
  tipwidth = 0.46[mm]
  epsilon_real = 6e-9[F/m]
  epsilon_relative = epsilon_real/epsilon0_const
  alpha1 = -6.06[N/V/m]
  alpha2 = 16[N/V/m]
  alpha3 = -6.98[N/V/m]
  p1 = 1
  p2 = 0
  p3 = 0
  Vamp = -10[kV/cm]*17.1[mm]
  Estep = 1e-6[s]
  h0_111 = alpha1*p1*p1*p1+alpha2*(p1+p1)/2+alpha3*p1*1
  h0_112 = alpha1*p1*p1*p2+alpha2*(p2+0)/2+alpha3*p1*0
  h0_113 = alpha1*p1*p1*p3+alpha2*(p3+0)/2+alpha3*p1*0
  h0_122 = alpha1*p1*p2*p2+alpha2*(0+0)/2+alpha3*p1*1
  h0_123 = alpha1*p1*p2*p3+alpha2*(0+0)/2+alpha3*p1*0
  h0_133 = alpha1*p1*p3*p3+alpha2*(0+0)/2+alpha3*p1*1
  h0_211 = alpha1*p2*p1*p1+alpha2*(0+0)/2+alpha3*p2*1
  h0_212 = alpha1*p2*p1*p2+alpha2*(0+p1)/2+alpha3*p2*0
  h0_213 = alpha1*p2*p1*p3+alpha2*(0+0)/2+alpha3*p2*0
  h0_222 = alpha1*p2*p2*p2+alpha2*(p2+p2)/2+alpha3*p2*1
  h0_223 = alpha1*p2*p2*p3+alpha2*(p3+0)/2+alpha3*p2*0
  h0_233 = alpha1*p2*p3*p3+alpha2*(0+0)/2+alpha3*p2*1
  h0_311 = alpha1*p3*p1*p1+alpha2*(0+0)/2+alpha3*p3*1
  h0_312 = alpha1*p3*p1*p2+alpha2*(0+0)/2+alpha3*p3*0
  h0_313 = alpha1*p3*p1*p3+alpha2*(0+p1)/2+alpha3*p3*0
  h0_322 = alpha1*p3*p2*p2+alpha2*(0+0)/2+alpha3*p3*1
  h0_323 = alpha1*p3*p2*p3+alpha2*(0+p2)/2+alpha3*p3*0
  h0_333 = alpha1*p3*p3*p3+alpha2*(p3+p3)/2+alpha3*p3*1
  block = 0.1[mm]
  thk = 5.1[mm]  // geometry
  hsize = 9[um]
  a3 = 0  // softening
  ck = 2*b0*Gf/c0
  offset = 4[mm]

Functions
  an1: Analytic "Vfunc" | funcname = Vfunc; expr = (t<Estep)*Vamp/Estep*t+(t>=Estep)*Vamp; args = t; argunit = s; fununit = V

Variables
  var2 "Mechanical"
    lambda = omega*E0*v0/(1+v0)/(1-2*v0)
    mu = omega*E0/(1+v0)/2
    lambda0 = E0*v0/(1+v0)/(1-2*v0)
    mu0 = E0/(1+v0)/2
    e11 = solid.eXX
    e22 = solid.eYY
    e33 = solid.eZZ
    e12 = solid.eXY
    e23 = solid.eYZ
    e13 = solid.eXZ
    sigma0_11 = lambda0*(e11+e22+e33)+2*mu0*e11
    sigma0_22 = lambda0*(e11+e22+e33)+2*mu0*e22
    sigma0_33 = lambda0*(e11+e22+e33)+2*mu0*e33
    sigma0_12 = 2*mu0*e12
    sigma0_23 = 2*mu0*e23
    sigma0_13 = 2*mu0*e13
    s1 = max(sigma0.e1,0)[Pa]
    n1 = sigma0.e11
    n2 = sigma0.e12
    n3 = sigma0.e13
    nn11 = n1*n1
    nn12 = n1*n2
    nn13 = n1*n3
    nn22 = n2*n2
    nn23 = n2*n3
    nn33 = n3*n3
  var4 "Electric"
    e1 = es.Ex
    e2 = es.Ey
    e3 = es.Ez
  var1 "Phase_field_basic"
    fai = (1-d)^p
    gai = a1*d*(1+a2*d+a3*d*d)
    dfai = -p*(1-d)^(p-1)
    dgai = a1+2*a1*a2*d+3*a1*a3*d*d
    omega = fai/(fai+gai)
    domega = (dfai*(fai+gai)-fai*(dfai+dgai))/(fai+gai)^2
    dalpha = xi+2*(1-xi)*d
  var3 "Phase_field_driving_force"
    Y_bar_m = 0.5*s1*s1/E0_bar  // mechanical part
    h_strain_1 = h0_111*nn11+h0_122*nn22+h0_133*nn33+2*(h0_112*nn12+h0_123*nn23+h0_113*nn13)
    h_strain_2 = h0_211*nn11+h0_222*nn22+h0_233*nn33+2*(h0_212*nn12+h0_223*nn23+h0_213*nn13)
    h_strain_3 = h0_311*nn11+h0_322*nn22+h0_333*nn33+2*(h0_312*nn12+h0_323*nn23+h0_313*nn13)
    Y_bar_c = 0.5*s1/E0_bar*(e1*h_strain_1+e2*h_strain_2+e3*h_strain_3)  // couple part
    Y_bar = Y_bar_m-Y_bar_c  // total
    Y0 = ft*ft/2/E0_bar  // threshold
    H = max(Y0,max(Y_bar,Ymax))
    ph = -domega*H-Gf*dalpha/c0/b0

Probes
  bnd1: Boundary on boundaries 31, 32
    type = integral
    expr = -solid.RFy
    unit = N
    descr = -solid2.RFy
    method = summation
    frame = spatial
    table = tbl1

Common definitions
  matdiag1: MatrixDiagonalization "sigma0" on entire geometry
    name = sigma0
    matrix = 
      {sigma0_11, sigma0_12, sigma0_13}
      {sigma0_12, sigma0_22, sigma0_23}
      {sigma0_13, sigma0_23, sigma0_33}
  state1: StateVariables "History" on domains 2-5, 7
    name = History
    state = Ymax
    initialValue = 0
    updateExpression = max(Ymax,Y_bar)
    update = afterStep

Geometry
  geom1 "Geometry 1" (2D, length unit m)
    r1: Rectangle | size = {17.1[mm], 9[mm]}
    r2: Rectangle | pos = {17.1[mm]/2, 9[mm]+block/2}; base = center; size = {block, block}
    r3: Rectangle | pos = {0, -block}; size = {block, block}
    r4: Rectangle | pos = {17.1[mm]-block, -block}; size = {block, block}
    pt1: Point | p = {17.1[mm]/2, 9[mm]+block}
    pt2: Point | p = {block/2, -block}
    pt3: Point | p = {17.1[mm]-block/2, -block}
    uni1: Union | input = r1, r2, r3, r4
    pol1: Polygon
      source = table
      table = 
        {17.1[mm]/2-tipwidth/2-offset, 0}
        {17.1[mm]/2-tipwidth/2-offset, 4[mm]-tiplength}
        {17.1[mm]/2-offset, 4[mm]}
        {17.1[mm]/2+tipwidth/2-offset, 4[mm]-tiplength}
        {17.1[mm]/2+tipwidth/2-offset, 0}
    dif1: Difference | input = uni1; input2 = pol1
    pol2: Polygon
      type = open
      source = table
      table = {{4.45[mm], 3.8[mm]}, {4.2[mm], 4[mm]}, {5.0[mm], 6[mm]}, {5.5[mm], 7.5[mm]}, {5.8[mm], 9[mm]}}
    pol3: Polygon
      type = open
      source = table
      table = 
        {17.1[mm]/2-offset+tipwidth/2-0.15[mm], 4[mm]-tiplength+0.3[mm]}
        {5[mm], 3.8[mm]}
        {5.9[mm], 6[mm]}
        {6.45[mm], 7.5[mm]}
        {6.65[mm], 9[mm]}
    pol4: Polygon | type = open; source = table; table = {{17.1[mm]/2-offset, 4[mm]}, {6[mm], 7.6[mm]}, {6.2[mm], 9[mm]}}
    pol5: Polygon | type = open; source = table; table = {{11[mm], 9[mm]}, {9[mm], 0}}
    fin: Finalize

Physics
  solid: SolidMechanics on domains 1-8
    dependent variable u = {u, v, w}
    ShapeProperty.order_displacement = 1
    EquationForm.form = Automatic
    Type2D.Type2D = PlaneStress
    d.d = thk
    StructuralTransientBehavior.StructuralTransientBehavior = Quasistatic
    lemm1: LinearElasticModel "Linear Elastic Material 1" (default)
      SolidModel = Isotropic
      E_mat = userdef
      E = E0*omega
      nu_mat = userdef
      nu = v0
      rho_mat = userdef
      rho = 0
    free1: Free (default)
    init1: init "Initial Values 1" (default)
    pzm1: PiezoelectricMaterialModel "Piezoelectric Material 1" on domains 2-5, 7
      cE_mat = userdef
      cE = {lambda+2*mu, lambda, lambda, 0, 0, 0, lambda, lambda+2*mu, lambda, 0, 0, 0, lambda, lambda, lambda+2*mu, 0, 0, 0, 0, 0, 0, mu, 0, 0, 0, 0, 0, 0, mu, 0, 0, 0, 0, 0, 0, mu}
      eES_mat = userdef
      eES = {h0_111*omega, h0_211*omega, h0_311*omega, h0_122*omega, h0_222*omega, h0_322*omega, h0_133*omega, h0_233*omega, h0_333*omega, h0_123*omega, h0_223*omega, h0_323*omega, h0_113*omega, h0_213*omega, h0_313*omega, h0_112*omega, h0_212*omega, h0_312*omega}
      epsilonrS_mat = userdef
      epsilonrS = epsilon_relative*omega
      coordinateSystem = GlobalSystem
    lemm2: LinearElasticModel "Linear Elastic Material 2" on domains 1, 6, 8
      E_mat = userdef
      E = E0
      nu_mat = userdef
      nu = v0
      rho_mat = userdef
      rho = 0
    disp1: Displacement0 "Prescribed Displacement 1" on points 4 | Direction = {1, 1, 0}
    disp2: Displacement0 "Prescribed Displacement 2" on points 33 | Direction = {0, 1, 0}
    disp3: Displacement0 "Prescribed Displacement 3" on points 26 | Direction = {0, 1, 0}; U0 = {0, -0.001[mm/s]*t, 0}
  poeq: PoissonEquation "Poisson's Equation 1" on domains 2-5, 7
    dependent variable d
    ShapeProperty.order = 1
    Units.CustomSourceTermUnit = Pa
    peq1: PoissonEquation "Poisson's Equation 1" (default) | f = ph; c = {ck, 0, 0, ck}
    zflx1: ZeroFluxBoundary "Zero Flux 1" (default)
    init1: init "Initial Values 1" (default)
  es: Electrostatics "Electrostatic" on domains 2-5, 7
    dependent variable V
    ShapeProperty.order_electricpotential = 1
    d.d = thk
    ccn1: ChargeConservation (default) | epsilonr_mat = userdef; epsilonr = epsilon_relative*omega
    zc1: ZeroCharge (default)
    init1: init "Initial Values 1" (default)
    ccnp1: ChargeConservationPiezo "Charge Conservation, Piezoelectric 1" on domains 2-5, 7
      epsilonrS_mat = userdef
      epsilonrS = 1
      coordinateSystem = GlobalSystem
    pot1: ElectricPotential on boundaries 3
    pot2: ElectricPotential on boundaries 43 | V0 = Vfunc(t)

Multiphysics
  pze1: PiezoelectricEffect on all domains | Solid_physics = solid; Electrostatics_physics = es

Mesh
  mesh1 "Mesh 1"
    size: MeshSizeDefault | hmax = 0.2[mm]; hmin = hsize; hgrad = 1.2; custom = on
    fq1: FreeQuad on domains 1, 6, 8
      size1: Size on domains 1, 3, 4, 6, 8 | hmax = hsize; custom = on
    fq3: FreeQuad on domains 3
      size1: Size on domains 3 | hmax = hsize; custom = on
    fq4: FreeQuad on domains 4
      size1: Size on domains 4 | hmax = hsize; custom = on
    fq2: FreeQuad on remaining entities

Studies
  std1 "Study 1"
    time: Transient "Time Dependent 1"
      tlist = range(0,Estep/20,Estep),range(Estep,0.01,4.5)
      usertol = on
      rtol = 0.001
      notstudy = zero

Solver configurations
  sol1 "Solution 1" (study std1)
    v1: Variables "Dependent Variables 1"
      comp1_u: Field "Displacement field (comp1.u)" | scaleval = 1e-2*0.156524758425
    t1: Time "Time-Dependent Solver 1"
      tlist = range(0,Estep/20,Estep),range(Estep,0.01,4.5)
      tout = tsteps
      initialstepbdf = Estep/50
      maxstepconstraintbdf = expr
      maxstepbdf = 0.01
      maxstepexpressionbdf = (t<=Estep)*Estep/20+0.01*(t>Estep)
      estrat = exclude
      dDef: Direct
      se1: Segregated | segterm = itertol; segiter = 1000; maxsegiter = 2000; segtermonres = auto
        ssDef: SegregatedStep "disp&phi"
          segvar = {comp1_u, comp1_solid_wZ, comp1_solid_uZ, comp1_solid_vZ, comp1_V}
          subdtech = auto
          maxsubiter = 1000
        ss1: SegregatedStep "damage" | segvar = {comp1_d}; subdtech = auto; maxsubiter = 1000
        ss2: SegregatedStep "history" | segvar = {comp1_History}; subdtech = auto

Datasets
  dset1: Solution | solution = sol1
  dset2: Solution "Probe Solution 2" | solution = sol1
  int1: Integral "bnd1" on boundaries 31, 32 | data = dset2

Tables
  tbl1: Table "Probe Table 1"
    Time (s) | -solid2.RFy (N), bnd1 {int1}
    0 | 0
    2e-08 | -0.309171
    4e-08 | -0.618342
    8e-08 | -1.23668
    1.3e-07 | -2.00961
    1.8e-07 | -2.78254
    2.3e-07 | -3.55547
    2.8e-07 | -4.32839
    3.3e-07 | -5.10132
    3.8e-07 | -5.87425
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
Plots
  pg5: PlotGroup2D "d" | data = dset1
    surf1: Surface "d" | expr = d; descr = 因变量 d
  pg8: PlotGroup1D "Probe Plot Group 8"
    tblp1: Table "Probe Table Graph 1" | table = tbl1